*HEADING
DCB mode-I reference model, mesh generated by diffcohesive/mesh/specimens.py
**
*NODE
1, 0.0000000000, 0.0000000000
2, 0.5000000000, 0.0000000000
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**
*ELEMENT, TYPE=CPE3, ELSET=ARMS
1, 1, 2, 33
2, 1, 33, 32
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**
*ELEMENT, TYPE=COH2D4, ELSET=COHESIVE
481, 135, 136, 291, 290
482, 136, 137, 292, 291
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**
*SOLID SECTION, ELSET=ARMS, MATERIAL=ARM_MAT
1.0
*COHESIVE SECTION, ELSET=COHESIVE, MATERIAL=COH_MAT, RESPONSE=TRACTION SEPARATION, THICKNESS=SPECIFIED
1.0
**
*MATERIAL, NAME=ARM_MAT
*ELASTIC
1000.0, 0.3
**
*MATERIAL, NAME=COH_MAT
*ELASTIC, TYPE=TRACTION
10000.0, 10000.0, 10000.0
*DAMAGE INITIATION, CRITERION=QUADS
5.0, 5.0, 5.0
*DAMAGE EVOLUTION, TYPE=ENERGY, MIXED MODE BEHAVIOR=BK, SOFTENING=LINEAR, POWER=1.0
0.05, 0.05, 0.05
**
*NSET, NSET=RIGHT_EDGE
31, 62, 93, 124, 155, 186, 217, 248, 279, 310
*NSET, NSET=TIP_TOP
249
*NSET, NSET=TIP_BOTTOM
1
**
*STEP, NAME=OPEN, NLGEOM=NO, INC=1000
*STATIC, RIKS
0.03, 1.0, 1e-08, 0.08, 1.5, 249, 2, 0.360000
*BOUNDARY
RIGHT_EDGE, 1, 2, 0.0
TIP_TOP, 2, 2, 0.300000
TIP_BOTTOM, 2, 2, -0.300000
*OUTPUT, FIELD, FREQUENCY=1
*NODE OUTPUT
U, RF
*ELEMENT OUTPUT, ELSET=COHESIVE
SDEG, DMICRT
*OUTPUT, HISTORY, FREQUENCY=1
*NODE OUTPUT, NSET=TIP_TOP
U2, RF2
*NODE OUTPUT, NSET=TIP_BOTTOM
U2, RF2
*END STEP
