*HEADING
3D DCB mode-I reference model, mesh generated by diffcohesive/mesh/specimens.py
**
*NODE
1, 0.0000000000, 0.0000000000, 0.0000000000
2, 2.0000000000, 0.0000000000, 0.0000000000
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**
*ELEMENT, TYPE=C3D8, ELSET=ARMS
1, 1, 2, 33, 32, 156, 157, 188, 187
2, 2, 3, 34, 33, 157, 158, 189, 188
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**
*ELEMENT, TYPE=COH3D8, ELSET=COHESIVE
241, 73, 228, 229, 74, 476, 507, 508, 477
242, 74, 229, 230, 75, 477, 508, 509, 478
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**
*SOLID SECTION, ELSET=ARMS, MATERIAL=ARM_MAT
,
*COHESIVE SECTION, ELSET=COHESIVE, MATERIAL=COH_MAT, RESPONSE=TRACTION SEPARATION, THICKNESS=SPECIFIED
1.0
**
*MATERIAL, NAME=ARM_MAT
*ELASTIC
70000.0, 0.3
**
*MATERIAL, NAME=COH_MAT
*ELASTIC, TYPE=TRACTION
10000.0, 10000.0, 10000.0
*DAMAGE INITIATION, CRITERION=QUADS
30.0, 30.0, 30.0
*DAMAGE EVOLUTION, TYPE=ENERGY, MIXED MODE BEHAVIOR=BK, SOFTENING=LINEAR, POWER=1.0
0.5, 0.5, 0.5
**
*NSET, NSET=RIGHT_FACE
31, 62, 93, 124, 155, 186
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*NSET, NSET=TIP_TOP
125, 280, 435
*NSET, NSET=TIP_BOTTOM
1, 156, 311
**
*STEP, NAME=OPEN, NLGEOM=NO, INC=2000
*STATIC
0.010000, 2.500000, 1e-10, 0.100000
*BOUNDARY
RIGHT_FACE, 1, 3, 0.0
TIP_TOP, 2, 2, 1.250000
TIP_BOTTOM, 2, 2, -1.250000
*OUTPUT, FIELD, FREQUENCY=5
*NODE OUTPUT
U, RF
*ELEMENT OUTPUT, ELSET=COHESIVE
SDEG
*OUTPUT, HISTORY, FREQUENCY=1
*NODE OUTPUT, NSET=TIP_TOP
U2, RF2
*NODE OUTPUT, NSET=TIP_BOTTOM
U2, RF2
*END STEP
